Bar01nm := 592.2
Bar02nm := 614.5
Bar04nm := 697.2
Bar06nm := 592.57
S00 := 0.00299
S01 := 0.04746
S02 := 1.967
S04 := 0.09579
S06 := 0
n := 1.5
τ := 0.34*10^-3
σ01 := (Bar01nm*10^-7)^-1
σ02 := (Bar02nm*10^-7)^-1
σ04 := (Bar04nm*10^-7)^-1
σ06 := (Bar06nm*10^-7)^-1
σ02 = 16273.4
σ04 = 14343.1
σ06 = 16875.6
σ01 = 16886.2
A01 := 0.31*(10^-11)*(n^3)*(σ01^3)
χ := n*((n^2) + 2)*((n^2) + 2)/9
A02 := A01*S02/S01
A04 := (S04/S01)*A01
A06 := S06/S01*A01
Ω2 := A02/(2.33*(10^8)*(σ02^3)*χ)
Ω4 := A04/(7.23*(10^10)*(σ04^3)*χ*0.0023)
Ω6 := A06/(7.23*(10^10)*(σ06^3)*χ*0.0002)
ρ2 := Ω2*(10^20)
ρ4 := Ω4*(10^20)
ρ6 := Ω6*(10^20)
ρ2 = 69.0701
ρ4 = 6.88339
ρ6 = 0
R02 := S00/S02
R02 = 0.00152008
A01 = 50.3768
A02 = 2087.89
A04 = 101.677
A06 = 0
Arad := A01 + A02 + A04
Arad = 2239.94
Atotal := 1/τ
Atotal = 2941.18
Anr := Atotal - Arad
Anr = 701.236
η := Arad*100/Atotal
η = 76.158
nH2O := 1.05*(Atotal - Arad)/1000
nH2O = 0.736298
Explicaçao
n - indice  # de  # refreçao
.
σ01 - energia  # do  # baricentro  # da  # transiçao
5D0 - 7F1
σ02 - energia  # do  # baricentro  # da  # transiçao
5D0 - 7F2
σ04 - energia  # do  # baricentro  # da  # transiçao
5D0 - 7F4
Sij - area  # sob  # a  # curva  # de  # emissao
Aij - coeficiente  # de  # emissao  # espontanea
R02 - relaçao  # entre  # as  # intensidades  # das  # transiçoes
5D0 - 7F0  # e
5D0 - 7F2
ρ2
e
ρ4 - parametros  # de  # intensidades  # em  # unidades  # de  # (10^-20)  # cm^2
# Arad= somatório dos coef. de emissão espontânea de Aoj
# τ  = tempo de vida (em segundos)
# nH2O = número de moléculas de água (Worroch)
