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# - Rates:
τ := 26.6*10^-6
τ_CT := 10^-7
W_1 := 4.17
W_2 := 1.17*10^-47
τT := 0.1*10^-3
ϕ := 100
W_3 := 6.28*10^6
W_4 := 1.60*10^-20
W_ISC := 10^7
W_SCT := 10^7
W_bSCT := 10^5
W_CTT := 10^7
W_bCTT := 10^-5
# - Five-levels rate equations:
# Time Interval (s):
T1 := 10*10^-3
Given  # Initial Conditions:
# (a)
d/dt(N_0(t)) == -ϕ*N_0(t) + 1/τT*N_1(t) + 1/τ*N_3(t) + 1/τ_CT*N_4(t)
N_0(0) == 1
# (b)
d/dt(N_1(t)) == -(1/τT + W_3)*N_1(t) + W_ISC*N_2(t) + W_4*N_3(t) + W_CTT*N_4(t)
N_1(0) == 0
# (c)
d/dt(N_2(t)) == -(W_ISC + W_1 + W_SCT)*N_2(t) + ϕ*N_0(t) + W_2*N_3(t) + W_bSCT*N_4(t)
N_2(0) == 0
# (d)
d/dt(N_3(t)) == -(1/τ + W_4 + W_2)*N_3(t) + W_1*N_2(t) + W_3*N_1(t)
N_3(0) == 0
# (e)
d/dt(N_4(t)) == -(1/τ_CT + W_bSCT + W_CTT)*N_4(t) + W_SCT*N_2(t) + W_bCTT*N_1(t)
N_4(0) == 0
# The integer number of points used to interpolate the solution function:
npoints := 2000
t1 := 0, T1/npoints .. T1
[P_0; P_1; P_2; P_3; P_4] := Odesolve([N_0; N_1; N_2; N_3; N_4], t, T1, npoints)
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# Normalization condition to guarantee the convergence criteria.
# The value of this integral must be equal to 1 independently of the simulation time chosen (T1).
integral((P_0(t1) + P_1(t1) + P_2(t1) + P_3(t1) + P_4(t1))/T1, t1 = 0 .. T1) = 1
# Figure 1. Transient of the populations for the ^2F_(5/2) (P_3, right-side scale) and T_1 (P_1, left-side scale) levels.
# - Populations in the steady-state regime:
# S_0
P_0(T1) = 0.997991
# S_1
P_2(T1) = 5.0024e-6
# LMCT
P_4(T1) = 2.48876e-6
# T_1
P_1(T1) = 1.19096e-5
# ^2F_(5/2)
P_3(T1) = 0.00198948
