Bar01nm := 594.2
Bar02nm := 613.8
Bar04nm := 702.2
Bar06nm := 0
S00 := 3447242.12
S01 := 37179770.88
S02 := 323763406.93
S04 := 85136961.72
S06 := 0
n := 1.5
τ := 0.230*10^-3
σ01 := (Bar01nm*10^-7)^-1
σ02 := (Bar02nm*10^-7)^-1
σ04 := (Bar04nm*10^-7)^-1
σ06 := (Bar06nm*10^-7)^-1  # error: Found a number with a magnitude greater than 10^307 while trying to evaluate this expression.
σ02 = 16292
σ04 = 14241
σ06 =  # error: This variable is undefined.
σ01 = 16829.4
A01 := 0.31*(10^-11)*(n^3)*(σ01^3)
χ := n*((n^2) + 2)*((n^2) + 2)/9
A02 := A01*(S02/S01)*(σ01/σ02)
A04 := (S04/S01)*A01*(σ01/σ04)
A06 := (S06/S01)*A01*(σ01/σ06)
Ω2 := A02/(2.33*(10^8)*(σ02^3)*χ)
Ω4 := A04/(7.23*(10^10)*(σ04^3)*χ*0.0023)
Ω6 := A06/(7.23*(10^10)*(σ06^3)*χ*0.0002)
ρ2 := Ω2*(10^20)
ρ4 := Ω4*(10^20)
ρ6 := Ω6*(10^20)
ρ2 = 14.7894
ρ4 = 9.33398
ρ6 =  # error
R02 := S00/S02
R02 = 0.0106474
A01 = 49.8698
A02 = 448.593
A04 = 134.951
A06 =  # error
Arad := A01 + A02 + A04
Arad = 633.414
Atotal := 1/τ
Atotal = 4347.83
Anr := Atotal - Arad
Anr = 3714.41
η := Arad*100/Atotal
η = 14.5685
nH2O := 1.05*(Atotal - Arad)/1000
nH2O = 3.90013
Explicaçao
n - indice  # de  # refreçao
.
σ01 - energia  # do  # baricentro  # da  # transiçao
5D0 - 7F1
σ02 - energia  # do  # baricentro  # da  # transiçao
5D0 - 7F2
σ04 - energia  # do  # baricentro  # da  # transiçao
5D0 - 7F4
Sij - area  # sob  # a  # curva  # de  # emissao
Aij - coeficiente  # de  # emissao  # espontanea
R02 - relaçao  # entre  # as  # intensidades  # das  # transiçoes
5D0 - 7F0  # e
5D0 - 7F2
ρ2
e
ρ4 - parametros  # de  # intensidades  # em  # unidades  # de  # (10^-20)  # cm^2
# Arad= somatório dos coef. de emissão espontânea de Aoj
# τ  = tempo de vida (em segundos)
# nH2O = número de moléculas de água (Worroch
