Bar01nm := 592.889
Bar02nm := 612.149
Bar04nm := 701.162
Bar06nm := 0
S00 := 8169.785
S01 := 61050.5735
S02 := 461265.174
S04 := 181458.228
S06 := 0
n := 1.5
τ := 0.23*10^-3
σ01 := (Bar01nm*10^-7)^-1
σ02 := (Bar02nm*10^-7)^-1
σ04 := (Bar04nm*10^-7)^-1
σ06 := (Bar06nm*10^-7)^-1  # error: Found a number with a magnitude greater than 10^307 while trying to evaluate this expression.
σ02 = 16335.9
σ04 = 14262
σ06 =  # error: This variable is undefined.
σ01 = 16866.6
A01 := 0.31*(10^-11)*(n^3)*(σ01^3)
χ := n*((n^2) + 2)*((n^2) + 2)/9
A02 := A01*(S02/S01)*(σ01/σ02)
A04 := (S04/S01)*A01*(σ01/σ04)
A06 := (S06/S01)*A01*(σ01/σ06)
Ω2 := A02/(2.33*(10^8)*(σ02^3)*χ)
Ω4 := A04/(7.23*(10^10)*(σ04^3)*χ*0.0023)
Ω6 := A06/(7.23*(10^10)*(σ06^3)*χ*0.0002)
ρ2 := Ω2*(10^20)
ρ4 := Ω4*(10^20)
ρ6 := Ω6*(10^20)
ρ2 = 12.807
ρ4 = 12.1509
ρ6 =  # error
R02 := S00/S02
R02 = 0.0177117
A01 = 50.2013
A02 = 391.616
A04 = 176.46
A06 =  # error
Arad := A01 + A02 + A04
Arad = 618.277
Atotal := 1/τ
Atotal = 4347.83
Anr := Atotal - Arad
Anr = 3729.55
η := Arad*100/Atotal
η = 14.2204
nH2O := 1.05*(Atotal - Arad)/1000
nH2O = 3.91603
Explicaçao
n - indice  # de  # refreçao
.
σ01 - energia  # do  # baricentro  # da  # transiçao
5D0 - 7F1
σ02 - energia  # do  # baricentro  # da  # transiçao
5D0 - 7F2
σ04 - energia  # do  # baricentro  # da  # transiçao
5D0 - 7F4
Sij - area  # sob  # a  # curva  # de  # emissao
Aij - coeficiente  # de  # emissao  # espontanea
R02 - relaçao  # entre  # as  # intensidades  # das  # transiçoes
5D0 - 7F0  # e
5D0 - 7F2
ρ2
e
ρ4 - parametros  # de  # intensidades  # em  # unidades  # de  # (10^-20)  # cm^2
# Arad= somatório dos coef. de emissão espontânea de Aoj
# τ  = tempo de vida (em segundos)
# nH2O = número de moléculas de água (Worroch
